*Heading
** Job name: Tensile Model name: Tensile
** Generated by: Abaqus/CAE 2017
*Preprint, echo=NO, model=NO, history=NO, contact=NO
**
** PARTS
**
*Part, name=Shell
*Node
      1,           0.,           0.,           0.
      2,           1.,           0.,           0.
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*Element, type=S4
   1,    1,    2,  103,  102
   2,    2,    3,  104,  103
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*Nset, nset=Fixed, generate
    1,  1011,   101
*Nset, nset=Middle
 506,
*Nset, nset=Moving, generate
  101,  1111,   101
** Region: (CompositeLayup-1-1: Generated From Layup)
*Elset, elset=CompositeLayup-1-1, generate
    1,  1000,     1
** Section: CompositeLayup-1-1
*Shell Section, elset=CompositeLayup-1-1, composite, layup=CompositeLayup-1
0.125, 3, UserMAT, 0., Ply-1
0.125, 3, UserMAT, 45., Ply-2
0.125, 3, UserMAT, -45., Ply-3
0.125, 3, UserMAT, 90., Ply-4
0.125, 3, UserMAT, 90., Ply-5
0.125, 3, UserMAT, -45., Ply-6
0.125, 3, UserMAT, 45., Ply-7
0.125, 3, UserMAT, 0., Ply-8
*Transverse Shear Stiffness
139540.0, 12460.0, 2730.0
*End Part
**
**
** ASSEMBLY
**
*Assembly, name=Assembly
**
*Instance, name=Shell-1, part=Shell
*End Instance
**
*End Assembly
**
** MATERIALS
**
*Material, name=UserMAT
*Depvar
      5,
*User Material, constants=10
135000.,10000.,  0.25, 4300., 2410., 1300.,   86.,  200.
  152.,    1.
**
** BOUNDARY CONDITIONS
**
** Name: Fixed Type: Displacement/Rotation
*Boundary
Shell-1.Fixed, 1, 1
Shell-1.Fixed, 3, 3
Shell-1.Fixed, 4, 4
Shell-1.Fixed, 5, 5
Shell-1.Fixed, 6, 6
** Name: Middle Type: Displacement/Rotation
*Boundary
Shell-1.Middle, 2, 2
** ----------------------------------------------------------------
**
** STEP: Load
**
*Step, name=Load, nlgeom=NO
*Static
0.1, 1., 1e-05, 1.
**
** BOUNDARY CONDITIONS
**
** Name: Moving Type: Displacement/Rotation
*Boundary
Shell-1.Moving, 1, 1, 1.5
**
** OUTPUT REQUESTS
**
*Restart, write, frequency=0
**
** FIELD OUTPUT: F-Output-1
**
*Output, field
*Node Output
U,
*Element Output, directions=YES
E,
**
** FIELD OUTPUT: F-Output-2
**
*Element Output, elset=Shell-1.CompositeLayup-1-1, directions=YES
1, 2, 3, 4, 5, 6, 7, 8, 9, 10, 11, 12, 13, 14, 15, 16
S, SDV
*Element Output, elset=Shell-1.CompositeLayup-1-1, directions=YES
17, 18, 19, 20, 21, 22, 23, 24
S, SDV
**
** HISTORY OUTPUT: H-Output-1
**
*Output, history, variable=PRESELECT
*End Step
